# OpenSim document version 40000
ScaleTool FullBodyModel_MuscleActuatedLowerLimb_TorqueActuatedUpperBody-scaled:
  mass: 104 [kg]
  height: -1
  age: -1
  GenericModelMaker:
    model_file: \gait2392_only_left.osim
  ModelScaler:
    apply: true
    scaling_order: manualScale
    time_range: -1 -1
    preserve_mass_distribution: true
    output_model_file: D:\Projects_MOCO\project_size\Opensim_Models\Gait2392\FemaleLarge.osim
    ScaleSet:
      Scale: scales=(1.0047 1.0047 1.0047) segment=pelvis apply=true
      Scale: scales=(1.0247 1.0247 1.0247) segment=femur_r apply=true
      Scale: scales=(1.0595 1.0595 1.0595) segment=tibia_r apply=true
      Scale: scales=(1.0247 1.0247 1.0247) segment=femur_l apply=true
      Scale: scales=(1.0595 1.0595 1.0595) segment=tibia_l apply=true
      Scale: scales=(1.0047 1.0047 1.0047) segment=torso apply=true
      Scale: scales=(1.1111 1.1111 1.1111) segment=humerus_r apply=true
      Scale: scales=(1.0559 1.0559 1.0559) segment=ulna_r apply=true
      Scale: scales=(1.0559 1.0559 1.0559) segment=radius_r apply=true
      Scale: scales=(1.1111 1.1111 1.1111) segment=humerus_l apply=true
      Scale: scales=(1.0559 1.0559 1.0559) segment=ulna_l apply=true
      Scale: scales=(1.0559 1.0559 1.0559) segment=radius_l apply=true
  MarkerPlacer:
    apply: false
    time_range: -1 -1
    max_marker_movement: -1
    IKTaskSet:
      IKMarkerTask RACR: apply=true weight=1
      IKMarkerTask LACR: apply=true weight=1
      IKMarkerTask C7: apply=true weight=1
      IKMarkerTask CLAV: apply=true weight=1
      IKMarkerTask RASH: apply=true weight=1
      IKMarkerTask RPSH: apply=true weight=1
      IKMarkerTask LASH: apply=true weight=1
      IKMarkerTask LPSH: apply=true weight=1
      IKMarkerTask RSJC: apply=true weight=1
      IKMarkerTask RUA1: apply=true weight=1
      IKMarkerTask RUA2: apply=true weight=1
      IKMarkerTask RUA3: apply=true weight=1
      IKMarkerTask RLEL: apply=true weight=1
      IKMarkerTask RMEL: apply=true weight=1
      IKMarkerTask RFAsuperior: apply=true weight=1
      IKMarkerTask RFAradius: apply=true weight=1
      IKMarkerTask RFAulna: apply=true weight=1
      IKMarkerTask LSJC: apply=true weight=1
      IKMarkerTask LUA1: apply=true weight=1
      IKMarkerTask LUA2: apply=true weight=1
      IKMarkerTask LUA3: apply=true weight=1
      IKMarkerTask LLEL: apply=true weight=1
      IKMarkerTask LMEL: apply=true weight=1
      IKMarkerTask LFAsuperior: apply=true weight=1
      IKMarkerTask LFAradius: apply=true weight=1
      IKMarkerTask LFAulna: apply=true weight=1
      IKMarkerTask RASI: apply=true weight=1
      IKMarkerTask LASI: apply=true weight=1
      IKMarkerTask RPSI: apply=true weight=1
      IKMarkerTask LPSI: apply=true weight=1
      IKMarkerTask LHJC: apply=true weight=1
      IKMarkerTask RHJC: apply=true weight=1
      IKMarkerTask RTH1: apply=true weight=1
      IKMarkerTask RTH2: apply=true weight=1
      IKMarkerTask RTH3: apply=true weight=1
      IKMarkerTask RLFC: apply=true weight=1
      IKMarkerTask RMFC: apply=true weight=1
      IKMarkerTask RKJC: apply=true weight=1
      IKMarkerTask RTB1: apply=true weight=1
      IKMarkerTask RTB2: apply=true weight=1
      IKMarkerTask RTB3: apply=true weight=1
      IKMarkerTask RLMAL: apply=true weight=1
      IKMarkerTask RMMAL: apply=true weight=1
      IKMarkerTask RAJC: apply=true weight=1
      IKMarkerTask RCAL: apply=true weight=1
      IKMarkerTask RTOE: apply=true weight=1
      IKMarkerTask RMT5: apply=true weight=1
      IKMarkerTask LTH1: apply=true weight=1
      IKMarkerTask LTH2: apply=true weight=1
      IKMarkerTask LTH3: apply=true weight=1
      IKMarkerTask LLFC: apply=true weight=1
      IKMarkerTask LMFC: apply=true weight=1
      IKMarkerTask LKJC: apply=true weight=1
      IKMarkerTask LTB1: apply=true weight=1
      IKMarkerTask LTB2: apply=true weight=1
      IKMarkerTask LTB3: apply=true weight=1
      IKMarkerTask LLMAL: apply=true weight=1
      IKMarkerTask LMMAL: apply=true weight=1
      IKMarkerTask LAJC: apply=true weight=1
      IKMarkerTask LCAL: apply=true weight=1
      IKMarkerTask LTOE: apply=true weight=1
      IKMarkerTask LMT5: apply=true weight=1
      IKMarkerTask REJC: apply=true weight=1
      IKMarkerTask LEJC: apply=true weight=1
      IKMarkerTask R_tibial_plateau: apply=true weight=1
      IKMarkerTask L_tibial_plateau: apply=true weight=1
