# OpenSim document version 40000
AnalyzeTool 3DGaitModel2392:
  replace_force_set: false
  results_directory: .
  output_precision: 8
  initial_time: 0
  final_time: 0.4
  solve_for_equilibrium_for_auxiliary_states: false
  maximum_number_of_integrator_steps: 20000
  maximum_integrator_step_size: 1
  minimum_integrator_step_size: 1e-8
  integrator_error_tolerance: 1e-5
  external_loads_file: grf_CoP_setup.xml
  coordinates_file: states.sto
  lowpass_cutoff_frequency_for_coordinates: 6
  AnalysisSet Analyses:
    JointReaction: start_time=0 end_time=0.4 step_interval=1 in_degrees=false joint_names=ALL apply_on_bodies=child
        express_in_frame=child
